AnyMatrix PointsAffine0 = {
  {0.023398, -0.050863, -0.034381},  // gh
  {0.0, 0.0, 0.0},  // Origin
  {0.006071, -0.003599, -0.030331},  // acj
  {0.02856498, -0.01142701, -0.001132002},  // deltoideus lateral 1 org
  {0.03856498, -0.008426996, -0.014132},  // deltoideus lateral 2 org
  {0.04056498, -0.008426984, -0.03313199},  // deltoideus lateral 3 org
  {0.03714399, -0.006523975, -0.04578298},  // deltoideus lateral 4 org
  {-0.08196395, -0.01098702, 0.01323703},  // deltoideus posterior 1 org
  {-0.03696398, -0.007987012, 0.009237012},  // deltoideus posterior 2 org
  {-0.01196399, -0.007987012, 0.009237004},  // deltoideus posterior 3 org
  {0.01503599, -0.01398702, 0.009236999},  // deltoideus posterior 4 org
  {0.032144, -0.008524, -0.028283},  // MuscleConnectorPlaneNode
  {0.022522, -0.017693, 0.00628},  // aa
  {0.001, -0.050863, -0.013},  // EdgeNode1
  {0.001, -0.035, -0.03},  // EdgeNode2
  {-0.001, -0.048, -0.03},  // GHReactionCenterNodeRotated
  {-0.025398, -0.045137, -0.025619},  // triceps_LH_ellipsoid
  {0.023398, -0.050863, -0.034381},  // teres_major_cyl
  {0.058565, -0.016427, -0.001132},  // acromion_cyl
  {-0.026602, -0.010863, -0.034381},  // coracoid_cyl
  {-0.0219756, -0.06010308, -0.04467136},  // subscapularis_torus
  {0.01, -0.025941, -0.085},  // O_biceps_brachii_caput_breve
  {-0.01799998, -0.024529, -0.02424197},  // O_biceps_brachii_caput_longum
  {-0.008965, 0.003103, -0.004761},  // I_trapezius_scapular_part_6
  {0.00048, -0.020997, -0.069575},  // I_pectoralis_minor_1
  {0.00396, -0.025567, -0.07233},  // I_pectoralis_minor_2
  {0.007443, -0.030139, -0.075071},  // I_pectoralis_minor_3
  {0.010919, -0.034718, -0.077827},  // I_pectoralis_minor_4
  {-0.021775, -0.017136, -0.001841},  // O_Biceps_LH
  {-0.020215, -0.015694, -0.0353},  // O_Biceps_SH
  {-0.018439, -0.015277, -0.033949},  // O_Cor_brach_1
  {-0.018439, -0.015277, -0.033949},  // O_Cor_brach_2
  {-0.002101, -0.05239, -0.012904},  // O_Triceps_LH_1
  {-0.014529, -0.053439, -0.008614},  // O_Triceps_LH_2
  {0.023398, -0.050863, -0.034381},  // gh_rotated1
  {0.041083898, -0.0084340898, -0.0393176},  // AcrEnd
  {0.01599054, -0.014885105, -0.014794438},  // AcrInf_1
  {0.023629935, -0.013398433, -0.023252413},  // AcrInf_2
  {0.019738741, -0.0029202485, -0.040895935},  // AcrMed_1
  {0.012536249, -0.0049213646, -0.028172629},  // AcrMed_2
  {0.02715621, -0.0092842067, -0.037954871},  // AcrInf_3
  {0.026836425, -0.013411788, -0.0012733096},  // AcrPost
  {0.0065374589, -0.0069897375, -0.018768908},  // AcrMed
  {0.037122343, -0.010720243, -0.020640681},  // AcrLat
  {0.039293133, -0.0087581407, -0.042056546},  // Acr1_1
  {0.039832305, -0.0075535704, -0.04140031},  // Acr1_2
  {0.028873259, -0.006678415, -0.045389108},  // Acr2_1
  {0.028811559, -0.0034673701, -0.04598397},  // Acr2_2
  {0.04008295, -0.0093840519, -0.031172624},  // AcrLat_1
  {0.018719448, -0.014889915, 0.0031231565},  // AcrPost_1
  {-0.084684007, -0.015033843, 0.013005603},  // Spine1
  {-0.021688925, -0.0053933812, 0.0018581306},  // Spine2
  {-0.11625922, -0.01398854, 0.0032606279},  // TS1
  {-0.12972845, -0.013430373, -0.00032817436},  // TS2
  {-0.089550085, 0.017306352, -0.022830846},  // AS
  {-0.14058039, -0.13354959, 0.00477718},  // AI
  {-0.018899772, -0.062865794, -0.019187592},  // TubIG
  {-0.12097257, -0.1340321, 0.0072835609},  // Lat1_1
  {-0.12043075, -0.13385096, 0.0093827704},  // Lat1_2
  {-0.06148053, -0.083790153, 0.0081165005},  // Lat2_1
  {-0.061750099, -0.080636919, 0.012975972},  // Lat2_2
  {-0.14718091, -0.11683124, 0.0012954313},  // Med1_1
  {-0.14828674, -0.11694653, 0.0034738646},  // Med1_2
  {-0.14707518, -0.065584429, 0.00035048398},  // Med2_1
  {-0.14887887, -0.065786891, 0.0020225619},  // Med2_2
  {-0.01566696, -0.026621161, -0.011637273},  // Col
  {-0.03868698, -0.024393307, -0.033384647},  // Notch
  {-0.0016426115, -0.039250605, -0.083446749},  // CorAnt1_1
  {-0.00057709846, -0.034914549, -0.085524514},  // CorAnt1_2
  {0.0034339963, -0.041565642, -0.0814934},  // CorAnt2_1
  {0.004199117, -0.035654277, -0.08460696},  // CorAnt2_2
  {0.0070973248, -0.039722305, -0.078453511},  // CorAnt3_1
  {0.0075696674, -0.03362288, -0.082645625},  // CorAnt3_2
  {0.0073180911, -0.035838202, -0.075335249},  // CorAnt4_1
  {0.0076735797, -0.031442635, -0.07823889},  // CorAnt4_2
  {-0.019642781, -0.023424687, -0.069837034},  // CorMed1
  {-0.010265923, -0.030683776, -0.078563727},  // CorMed2
  {-0.0032009287, -0.021861689, -0.064441852},  // CorMed3
  {-0.0069773304, -0.026322553, -0.06284488},  // CorMed3_1
  {0.0056635202, -0.029118443, -0.07226447},  // CorMed4
  {-0.044376463, -0.018379916, -0.0057708728},  // Fosse
  {0.00018873517, -0.029711934, -0.044880569},  // GlenS
  {-0.0012931054, -0.057224955, -0.017751876},  // GlenI
  {-0.0012402455, -0.055190619, -0.018997962},  // GlenI_up
  {-0.0008963868, -0.035885945, -0.019784085},  // GlenP
  {-0.0071808579, -0.055679105, -0.041340683},  // GlenA
  {-0.0028067969, -0.045673389, -0.028880091},  // GlenC
  {-0.0058149854, -0.043040171, -0.043980639},  // GlenAS
  {0.0019031428, -0.029059662, -0.031720825},  // GlenSP
  {-0.0010452806, -0.046525475, -0.013788131},  // GlenIP
  {-0.0042700511, -0.060929354, -0.031445686},  // GlenIA
  {-0.0023151848, -0.060044974, -0.025910301},  // GlenIA_1
  {-0.10810393, -0.01653095, 0.00085287413},  // Spine3
  {-0.075186357, -0.018743258, -0.0027802959},  // Spine4
  {-0.046838231, -0.021024924, -0.002301913},  // Spine5
  {-0.047744073, -0.0059892335, 0.0064916243},  // Spine6
  {0.000911757, -0.011623815, 0.0047822157},  // Spine7
  {-0.067944445, -0.002742446, -0.032933876},  // BordSup1
  {-0.048676345, -0.032098383, -0.016804229},  // BordSup2
  {-0.0751945, -0.019160112, -0.014596988},  // BordSup3
  {-0.094526201, -0.0086225448, -0.015124048},  // BordSup4
  {-0.010322117, -0.027061427, -0.054327782},  // CorGlen
  {0.00049444672, -0.036145143, -0.072782375}  // CorD_C
};

AnyMatrix PointsRBF0 = {
  {0.023398, -0.050863, -0.034381},  // gh
  {0.0, 0.0, 0.0},  // Origin
  {0.006071, -0.003599, -0.030331},  // acj
  {0.02856498, -0.01142701, -0.001132002},  // deltoideus lateral 1 org
  {0.03856498, -0.008426996, -0.014132},  // deltoideus lateral 2 org
  {0.04056498, -0.008426984, -0.03313199},  // deltoideus lateral 3 org
  {0.03714399, -0.006523975, -0.04578298},  // deltoideus lateral 4 org
  {-0.08196395, -0.01098702, 0.01323703},  // deltoideus posterior 1 org
  {-0.03696398, -0.007987012, 0.009237012},  // deltoideus posterior 2 org
  {-0.01196399, -0.007987012, 0.009237004},  // deltoideus posterior 3 org
  {0.01503599, -0.01398702, 0.009236999},  // deltoideus posterior 4 org
  {0.032144, -0.008524, -0.028283},  // MuscleConnectorPlaneNode
  {0.022522, -0.017693, 0.00628},  // aa
  {0.001, -0.050863, -0.013},  // EdgeNode1
  {0.001, -0.035, -0.03},  // EdgeNode2
  {-0.001, -0.048, -0.03},  // GHReactionCenterNodeRotated
  {-0.025398, -0.045137, -0.025619},  // triceps_LH_ellipsoid
  {0.023398, -0.050863, -0.034381},  // teres_major_cyl
  {0.058565, -0.016427, -0.001132},  // acromion_cyl
  {-0.026602, -0.010863, -0.034381},  // coracoid_cyl
  {-0.0219756, -0.06010308, -0.04467136},  // subscapularis_torus
  {0.01, -0.025941, -0.085},  // O_biceps_brachii_caput_breve
  {-0.01799998, -0.024529, -0.02424197},  // O_biceps_brachii_caput_longum
  {-0.008965, 0.003103, -0.004761},  // I_trapezius_scapular_part_6
  {0.00048, -0.020997, -0.069575},  // I_pectoralis_minor_1
  {0.00396, -0.025567, -0.07233},  // I_pectoralis_minor_2
  {0.007443, -0.030139, -0.075071},  // I_pectoralis_minor_3
  {0.010919, -0.034718, -0.077827},  // I_pectoralis_minor_4
  {-0.021775, -0.017136, -0.001841},  // O_Biceps_LH
  {-0.020215, -0.015694, -0.0353},  // O_Biceps_SH
  {-0.018439, -0.015277, -0.033949},  // O_Cor_brach_1
  {-0.018439, -0.015277, -0.033949},  // O_Cor_brach_2
  {-0.002101, -0.05239, -0.012904},  // O_Triceps_LH_1
  {-0.014529, -0.053439, -0.008614},  // O_Triceps_LH_2
  {0.023398, -0.050863, -0.034381},  // gh_rotated1
  {0.041083898, -0.0084340898, -0.0393176},  // AcrEnd
  {0.01599054, -0.014885105, -0.014794438},  // AcrInf_1
  {0.023629935, -0.013398433, -0.023252413},  // AcrInf_2
  {0.019738741, -0.0029202485, -0.040895935},  // AcrMed_1
  {0.012536249, -0.0049213646, -0.028172629},  // AcrMed_2
  {0.02715621, -0.0092842067, -0.037954871},  // AcrInf_3
  {0.026836425, -0.013411788, -0.0012733096},  // AcrPost
  {0.0065374589, -0.0069897375, -0.018768908},  // AcrMed
  {0.037122343, -0.010720243, -0.020640681},  // AcrLat
  {0.039293133, -0.0087581407, -0.042056546},  // Acr1_1
  {0.039832305, -0.0075535704, -0.04140031},  // Acr1_2
  {0.028873259, -0.006678415, -0.045389108},  // Acr2_1
  {0.028811559, -0.0034673701, -0.04598397},  // Acr2_2
  {0.04008295, -0.0093840519, -0.031172624},  // AcrLat_1
  {0.018719448, -0.014889915, 0.0031231565},  // AcrPost_1
  {-0.084684007, -0.015033843, 0.013005603},  // Spine1
  {-0.021688925, -0.0053933812, 0.0018581306},  // Spine2
  {-0.11625922, -0.01398854, 0.0032606279},  // TS1
  {-0.12972845, -0.013430373, -0.00032817436},  // TS2
  {-0.089550085, 0.017306352, -0.022830846},  // AS
  {-0.14058039, -0.13354959, 0.00477718},  // AI
  {-0.018899772, -0.062865794, -0.019187592},  // TubIG
  {-0.12097257, -0.1340321, 0.0072835609},  // Lat1_1
  {-0.12043075, -0.13385096, 0.0093827704},  // Lat1_2
  {-0.06148053, -0.083790153, 0.0081165005},  // Lat2_1
  {-0.061750099, -0.080636919, 0.012975972},  // Lat2_2
  {-0.14718091, -0.11683124, 0.0012954313},  // Med1_1
  {-0.14828674, -0.11694653, 0.0034738646},  // Med1_2
  {-0.14707518, -0.065584429, 0.00035048398},  // Med2_1
  {-0.14887887, -0.065786891, 0.0020225619},  // Med2_2
  {-0.01566696, -0.026621161, -0.011637273},  // Col
  {-0.03868698, -0.024393307, -0.033384647},  // Notch
  {-0.0016426115, -0.039250605, -0.083446749},  // CorAnt1_1
  {-0.00057709846, -0.034914549, -0.085524514},  // CorAnt1_2
  {0.0034339963, -0.041565642, -0.0814934},  // CorAnt2_1
  {0.004199117, -0.035654277, -0.08460696},  // CorAnt2_2
  {0.0070973248, -0.039722305, -0.078453511},  // CorAnt3_1
  {0.0075696674, -0.03362288, -0.082645625},  // CorAnt3_2
  {0.0073180911, -0.035838202, -0.075335249},  // CorAnt4_1
  {0.0076735797, -0.031442635, -0.07823889},  // CorAnt4_2
  {-0.019642781, -0.023424687, -0.069837034},  // CorMed1
  {-0.010265923, -0.030683776, -0.078563727},  // CorMed2
  {-0.0032009287, -0.021861689, -0.064441852},  // CorMed3
  {-0.0069773304, -0.026322553, -0.06284488},  // CorMed3_1
  {0.0056635202, -0.029118443, -0.07226447},  // CorMed4
  {-0.044376463, -0.018379916, -0.0057708728},  // Fosse
  {0.00018873517, -0.029711934, -0.044880569},  // GlenS
  {-0.0012931054, -0.057224955, -0.017751876},  // GlenI
  {-0.0012402455, -0.055190619, -0.018997962},  // GlenI_up
  {-0.0008963868, -0.035885945, -0.019784085},  // GlenP
  {-0.0071808579, -0.055679105, -0.041340683},  // GlenA
  {-0.0028067969, -0.045673389, -0.028880091},  // GlenC
  {-0.0058149854, -0.043040171, -0.043980639},  // GlenAS
  {0.0019031428, -0.029059662, -0.031720825},  // GlenSP
  {-0.0010452806, -0.046525475, -0.013788131},  // GlenIP
  {-0.0042700511, -0.060929354, -0.031445686},  // GlenIA
  {-0.0023151848, -0.060044974, -0.025910301},  // GlenIA_1
  {-0.10810393, -0.01653095, 0.00085287413},  // Spine3
  {-0.075186357, -0.018743258, -0.0027802959},  // Spine4
  {-0.046838231, -0.021024924, -0.002301913},  // Spine5
  {-0.047744073, -0.0059892335, 0.0064916243},  // Spine6
  {0.000911757, -0.011623815, 0.0047822157},  // Spine7
  {-0.067944445, -0.002742446, -0.032933876},  // BordSup1
  {-0.048676345, -0.032098383, -0.016804229},  // BordSup2
  {-0.0751945, -0.019160112, -0.014596988},  // BordSup3
  {-0.094526201, -0.0086225448, -0.015124048},  // BordSup4
  {-0.010322117, -0.027061427, -0.054327782},  // CorGlen
  {0.00049444672, -0.036145143, -0.072782375}  // CorD_C
};

AnyStringArray PointsName0 = {
 "gh",
 "Origin",
 "acj",
 "deltoideus lateral 1 org",
 "deltoideus lateral 2 org",
 "deltoideus lateral 3 org",
 "deltoideus lateral 4 org",
 "deltoideus posterior 1 org",
 "deltoideus posterior 2 org",
 "deltoideus posterior 3 org",
 "deltoideus posterior 4 org",
 "MuscleConnectorPlaneNode",
 "aa",
 "EdgeNode1",
 "EdgeNode2",
 "GHReactionCenterNodeRotated",
 "triceps_LH_ellipsoid",
 "teres_major_cyl",
 "acromion_cyl",
 "coracoid_cyl",
 "subscapularis_torus",
 "O_biceps_brachii_caput_breve",
 "O_biceps_brachii_caput_longum",
 "I_trapezius_scapular_part_6",
 "I_pectoralis_minor_1",
 "I_pectoralis_minor_2",
 "I_pectoralis_minor_3",
 "I_pectoralis_minor_4",
 "O_Biceps_LH",
 "O_Biceps_SH",
 "O_Cor_brach_1",
 "O_Cor_brach_2",
 "O_Triceps_LH_1",
 "O_Triceps_LH_2",
 "gh_rotated1",
 "AcrEnd",
 "AcrInf_1",
 "AcrInf_2",
 "AcrMed_1",
 "AcrMed_2",
 "AcrInf_3",
 "AcrPost",
 "AcrMed",
 "AcrLat",
 "Acr1_1",
 "Acr1_2",
 "Acr2_1",
 "Acr2_2",
 "AcrLat_1",
 "AcrPost_1",
 "Spine1",
 "Spine2",
 "TS1",
 "TS2",
 "AS",
 "AI",
 "TubIG",
 "Lat1_1",
 "Lat1_2",
 "Lat2_1",
 "Lat2_2",
 "Med1_1",
 "Med1_2",
 "Med2_1",
 "Med2_2",
 "Col",
 "Notch",
 "CorAnt1_1",
 "CorAnt1_2",
 "CorAnt2_1",
 "CorAnt2_2",
 "CorAnt3_1",
 "CorAnt3_2",
 "CorAnt4_1",
 "CorAnt4_2",
 "CorMed1",
 "CorMed2",
 "CorMed3",
 "CorMed3_1",
 "CorMed4",
 "Fosse",
 "GlenS",
 "GlenI",
 "GlenI_up",
 "GlenP",
 "GlenA",
 "GlenC",
 "GlenAS",
 "GlenSP",
 "GlenIP",
 "GlenIA",
 "GlenIA_1",
 "Spine3",
 "Spine4",
 "Spine5",
 "Spine6",
 "Spine7",
 "BordSup1",
 "BordSup2",
 "BordSup3",
 "BordSup4",
 "CorGlen",
 "CorD_C"
};
